# Лабораторная работа 9 "Уравнение теплопроводности".
# Гордеев Никита, группа 22307, вариант 7
# ДАНО:
# Промежуток, начальные и граничные условия, коэффициент и свободный член уравнения
p(x) := 1/(1 + x^2)  # коэффициент при второй производной по x
f(t, x) := -2*t*x  # правая часть уравнения
φ(x) := sqrt(1 + x)  # начальное условие
μ1(t) := 0.5*t  # граничные условия
μ2(t) := sqrt(1 + t)  # граничные условия
L := 2
T := 1
# ЭТАП 1: ПОСТРОЕНИЕ ЯВНОЙ РАЗНОСТНОЙ СХЕМЫ
# Параметры и коэффициенты разностной схемы
n := 20
# количество узлов
h := L/n  # шаг по пространству
q := 0.6
# размер временного шага
γ := h^2/(2*q)  # коэффициент
τ := 0.001  # временной шаг
m := 1/τ  # Общее количество временных слоев
γ = 0.00833333
k := 0 .. m  # Определение k в диапазоне от 0 до m
t[k] := k*τ  # Значения времени на слое
y[k, 0] := μ1(t[k])
y[k, m] := μ2(t[k])
# Граничное условие слева | Граничное условие справа
i := 1 .. n
x[i] := i*h  # Определение значений пространственной переменной x на каждом пространственном шаге
y[0, i] := φ(x[i])  # Установка начальных значений функции
k := 0 .. m - 1
# Итерации по пространству
i := 1 .. n - 1
y[k + 1, i] := y[k, i] + p(x[i])*τ/h^2*(y[k, i + 1] - 2*y[k, i] + y[k, i - 1]) + τ*f(t[k], x[i])
# Реализация явной разностной схемы для численного решения уравнения
# [plot: y[0, i], y[m/2, i], y[m, i] vs x[i]]
# [3D plot: y]
# Вторая прогонка для погрешности Рунге
n := 40  # числа узлов
h := L/n  # Вычисление шага
q := 0.6  # Порядок метода Рунге
γ := h^2/(2*q)  # Вычисление параметра
γ = 0.00208333
# Расчет параметра
τ := 0.025  # Шаг времени
m := 1/τ  # Количество временных шагов
k := 0 .. m  # Итерация по времени
t[k] := k*τ  # Задание временных значений
y1[k, 0] := μ1(t[k])  # Начальное значение на границе
y1[k, n] := μ2(t[k])  # Начальное значение на границе
i := 0 .. n
x[i] := i*h  # Значение x на i-том шаге
y1[0, i] := φ(x[i])
# Начальное значение
i := 1 .. n - 1  # Итерация по пространству
k := 0 .. m - 1  # Итерация по времени
y1[k + 1, i] := y1[k, i] + p(x[i])*τ/h^2*(y1[k, i + 1] - 2*y1[k, i] + y1[k, i - 1]) + τ*f(t[k], x[i])
# Обновление y1 на следующем временном шаге и внутри пространства
# Оценка погрешности по методу Рунге
i := 0 .. n/2  # Итерация по половине пространственных шагов
r[i] := 1/3*|y1[m, 2*i] - y[m/4, i]|  # Оценка погрешности методом Рунге
max(r) = 5.91376e58  # Вычисление максимального значения погрешности и сравнение с пороговым значением
# Демонстрация неустйчивости
n := 40
# Количество пространственных шагов
h := L/n  # Размер пространственного шага
q := 0.6
# Параметр для расчета γ
γ := h^2/(2*q)  # Расчет γ
γ = 0.00208333
τ := 0.00125  # Шаг времени
m := trunc(1/τ)  # Количество временных шагов
k := 0 .. m  # Итерация по времени
t[k] := k*τ  # Задание временных значений
i := 0 .. n  # Итерация по пространственным индексам
# [plot: y[m, i] vs x[i]]
IDS(n, m) :=
    h ← L/n
    τ ← 1/m
    α[1] ← 0
    for i ∈ 1 .. n - 1
        b[i] ← τ/h^2*p(x[i])
        α[i + 1] ← b[i]/(1 + (2 - α[i])*b[i])
    for k ∈ 1 .. m
        t[k] ← k*τ
        V[k, 0] ← μ1(t[k])
        V[k, n] ← μ2(t[k])
        β[1] ← μ1(t[k])
        for i ∈ 1 .. n - 1
            β[n + 1] ← (V[k - 1, i] + τ*f(t[k], x[i]))/(1 + (2 - α[i])*b[i])
        for i ∈ n, n - 1 .. 2
            V[k, i - 1] ← α[i]*V[k, i] + β[i]
        V
V1 := IDS(10, 20)
V1 = [
    0, 0, 0, 0, 0, 0, 0, 0, 0, 0, 0;
    0.025, 0.000264346, 0.000740697, 0.00181553, 0.00437547, 0.0105758, 0.0257656, 0.0634229, 0.158034, 0.399301, 1.0247;
    0.05, 0.000270567, 0.000758128, 0.00185826, 0.00447844, 0.0108247, 0.0263719, 0.0649154, 0.161753, 0.408697, 1.04881;
    0.075, 0.000276648, 0.000775167, 0.00190002, 0.00457909, 0.011068, 0.0269646, 0.0663744, 0.165388, 0.417883, 1.07238;
    0.1, 0.000282598, 0.000791839, 0.00194089, 0.00467758, 0.011306, 0.0275446, 0.067802, 0.168946, 0.426871, 1.09545;
    0.125, 0.000288425, 0.000808167, 0.00198091, 0.00477403, 0.0115392, 0.0281126, 0.0692001, 0.172429, 0.435673, 1.11803;
    0.15, 0.000294137, 0.000824172, 0.00202014, 0.00486858, 0.0117677, 0.0286693, 0.0705705, 0.175844, 0.444301, 1.14018;
    0.175, 0.00029974, 0.000839872, 0.00205862, 0.00496132, 0.0119918, 0.0292154, 0.0719148, 0.179194, 0.452765, 1.1619;
    0.2, 0.00030524, 0.000855284, 0.0020964, 0.00505236, 0.0122119, 0.0297515, 0.0732345, 0.182482, 0.461073, 1.18322;
    0.225, 0.000310643, 0.000870423, 0.0021335, 0.00514179, 0.012428, 0.0302781, 0.0745308, 0.185712, 0.469234, 1.20416;
    0.25, 0.000315954, 0.000885303, 0.00216998, 0.00522969, 0.0126405, 0.0307958, 0.0758049, 0.188887, 0.477256, 1.22474;
    0.275, 0.000321177, 0.000899937, 0.00220585, 0.00531614, 0.0128495, 0.0313048, 0.077058, 0.192009, 0.485145, 1.24499;
    0.3, 0.000326316, 0.000914337, 0.00224114, 0.0054012, 0.0130551, 0.0318057, 0.078291, 0.195082, 0.492908, 1.26491;
    0.325, 0.000331375, 0.000928513, 0.00227589, 0.00548495, 0.0132575, 0.0322989, 0.0795049, 0.198106, 0.50055, 1.28452;
    0.35, 0.000336359, 0.000942477, 0.00231012, 0.00556743, 0.0134568, 0.0327846, 0.0807005, 0.201085, 0.508078, 1.30384;
    0.375, 0.000341269, 0.000956236, 0.00234384, 0.00564871, 0.0136533, 0.0332632, 0.0818787, 0.204021, 0.515495, 1.32288;
    0.4, 0.00034611, 0.000969801, 0.00237709, 0.00572884, 0.013847, 0.0337351, 0.0830401, 0.206915, 0.522808, 1.34164;
    0.425, 0.000350884, 0.000983178, 0.00240988, 0.00580786, 0.014038, 0.0342004, 0.0841855, 0.209769, 0.530019, 1.36015;
    0.45, 0.000355594, 0.000996375, 0.00244223, 0.00588582, 0.0142264, 0.0346595, 0.0853156, 0.212585, 0.537134, 1.3784;
    0.475, 0.000360243, 0.0010094, 0.00247415, 0.00596276, 0.0144124, 0.0351126, 0.0864309, 0.215364, 0.544155, 1.39642;
    0.5, 0.000364832, 0.00102226, 0.00250567, 0.00603873, 0.014596, 0.0355599, 0.087532, 0.218108, 0.551088, 1.41421
]
